*Heading
** Job name: Job-8 Model name: Cylinder_2
** Generated by: Abaqus/CAE 2025
*Preprint, echo=NO, model=NO, history=NO, contact=NO
**
** PARTS
**
*Part, name=Part-1
*End Part
**
**
** ASSEMBLY
**
*Assembly, name=Assembly
**
*Instance, name=Part-1-1, part=Part-1
*Node
      1, 0.00474999985,           0., 0.00634999992
      2, 0.00474999985,           0., 0.0126999998
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*Element, type=C3D8R
   1,   12,  165,  155,   11,  666, 1924, 1914,  665
   2,  361,  364,  225,  207, 2120, 2123, 1984, 1966
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*Nset, nset=_PickedSet4, internal, generate
    1,  6969,     1
*Elset, elset=_PickedSet4, internal, generate
    1,  6094,     1
*Nset, nset=Set-1
  1,  4,  5,  6,  7,  8
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*Elset, elset=Set-1
    1,    3,    4,    6,    8,   10
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*Nset, nset=Set-base
   2,  53,  54,  55,  56,  57
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*Elset, elset=Set-base
 2771, 2773, 2774, 2776, 2778, 2780
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*Nset, nset=Set-top
   3, 102, 103, 104, 105, 106
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*Elset, elset=Set-top
 5818, 5820, 5821, 5823, 5825, 5827
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** Section: Section-1
*Solid Section, elset=_PickedSet4, material="JC Steel"
,
*End Instance
**
*Nset, nset=Set-2, instance=Part-1-1, generate
    1,  6969,     1
**
*Nset, nset=_PickedSet6, internal, instance=Part-1-1
   2,  53,  54,  55,  56,  57
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*Elset, elset=_PickedSet6, internal, instance=Part-1-1, generate
 2771,  3047,     1
*Elset, elset=__PickedSurf4_S2, internal, instance=Part-1-1, generate
 5818,  6094,     1
*Surface, type=ELEMENT, name=_PickedSurf4, internal
__PickedSurf4_S2, S2
*End Assembly
**
** MATERIALS
**
*Material, name="JC Steel"
*Elastic
 2.1e+08, 0.3
*Plastic, hardening=JOHNSON COOK
A_PARAM, B_PARAM, N_PARAM, M_PARAM,   1793., 298
C_PARAM
**
** BOUNDARY CONDITIONS
**
** Name: BC-1 Type: Displacement/Rotation
*Boundary
_PickedSet6, 1, 1
_PickedSet6, 2, 2
_PickedSet6, 3, 3
**
** PREDEFINED FIELDS
**
** Name: Predefined Field-1   Type: Temperature
*Initial Conditions, type=TEMPERATURE
Set-2, 573.
** ----------------------------------------------------------------
**
** STEP: Ramp
**
*Step, name=Ramp, nlgeom=NO, inc=500
*Static
0.005, 10.0, 0.00001, 0.05
**
** LOADS
**
** Name: Load-1   Type: Pressure
*Dsload
_PickedSurf4, P, 2000000000.
**
** OUTPUT REQUESTS
**
*Restart, write, frequency=0
**
** FIELD OUTPUT: F-Output-2
**
*Output, field, frequency=1
*Node Output, nset=Part-1-1.Set-1
U, UR, RF
*Element Output, elset=Part-1-1.Set-1, directions=YES
E, S, LE
**
** FIELD OUTPUT: F-Output-1
**
*Output, field, frequency=1
*Node Output, nset=Part-1-1.Set-1
U, UR, RF
*Element Output, elset=Part-1-1.Set-1, directions=YES
E, S, LE
**
** HISTORY OUTPUT: H-Output-2
**
*Output, history, frequency=1
*Node Output, nset=Part-1-1.Set-1
U3, RF
*Element Output, elset=Part-1-1.Set-1, directions=YES
E, S33, LE
**
** HISTORY OUTPUT: H-Output-1
**
*Output, history, frequency=1
*Node Output, nset=Part-1-1.Set-1
  U, RF
*End Step
** ----------------------------------------------------------------
** NO
** STEP: Hold
**
*Step, name=Hold, nlgeom=NO, inc=500
*Static
0.005, 5.0, 0.00001, 0.05
**
** OUTPUT REQUESTS
**
*Restart, write, frequency=0
**
** FIELD OUTPUT: F-Output-2
**
*Output, field, frequency=1
*Node Output, nset=Part-1-1.Set-1
U, UR, RF
*Element Output, elset=Part-1-1.Set-1, directions=YES
E, S, LE
**
** FIELD OUTPUT: F-Output-1
**
*Output, field, frequency=1
*Node Output, nset=Part-1-1.Set-1
U, UR, RF
*Element Output, elset=Part-1-1.Set-1, directions=YES
E, S, LE
**
** HISTORY OUTPUT: H-Output-2
**
*Output, history, frequency=1
*Node Output, nset=Part-1-1.Set-1
U, RF
*Element Output, elset=Part-1-1.Set-1, directions=YES
E, S33, LE
**
** HISTORY OUTPUT: H-Output-1
**
*Output, history, frequency=1
*Node Output, nset=Part-1-1.Set-1
  U, RF
*End Step
