*Heading
** Job name: Job-8 Model name: Cylinder_2
** Generated by: Abaqus/CAE 2025
*Preprint, echo=NO, model=NO, history=NO, contact=NO
**
** PARTS
**
*Part, name=Part-1
*End Part
**
**
** ASSEMBLY
**
*Assembly, name=Assembly
**
*Instance, name=Part-1-1, part=Part-1
*Node
      1, 0.00474999985,           0., 0.00634999992
      2, 0.00474999985,           0., 0.0126999998
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*Element, type=C3D8R
   1,   12,  165,  155,   11,  666, 1924, 1914,  665
   2,  361,  364,  225,  207, 2120, 2123, 1984, 1966
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*Nset, nset=_PickedSet4, internal, generate
    1,  6969,     1
*Elset, elset=_PickedSet4, internal, generate
    1,  6094,     1
*Nset, nset=Set-1
  1,  4,  5,  6,  7,  8
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*Elset, elset=Set-1
    1,    3,    4,    6,    8,   10
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*Nset, nset=Set-base
   2,  53,  54,  55,  56,  57
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*Elset, elset=Set-base
 2771, 2773, 2774, 2776, 2778, 2780
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*Nset, nset=Set-top
   3, 102, 103, 104, 105, 106
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*Elset, elset=Set-top
 5818, 5820, 5821, 5823, 5825, 5827
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** Section: Section-1
*Solid Section, elset=_PickedSet4, material="JC Steel"
,
*End Instance
**
*Nset, nset=Set-2, instance=Part-1-1, generate
    1,  6969,     1
*Elset, elset=Set-2, instance=Part-1-1, generate
    1,  6094,     1
*Nset, nset=Set-3, instance=Part-1-1
    3,  102,  103,  104,  105,  106
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*Elset, elset=Set-3, instance=Part-1-1, generate
 5818,  6094,     1
*Nset, nset=_PickedSet6, internal, instance=Part-1-1
   2,  53,  54,  55,  56,  57
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*Elset, elset=_PickedSet6, internal, instance=Part-1-1, generate
 2771,  3047,     1
*End Assembly
*Amplitude, name=Amp-1
             0.,              0.,              236.2,              1.
**
** MATERIALS
**
*Material, name="JC Steel"
*Elastic
 7.0e+10, 0.33
*Plastic, hardening=JOHNSON COOK
1.2e+08, 3.98e+08, 0.5195, 0.8,   911., 298
**
** BOUNDARY CONDITIONS
**
** Name: BC-1 Type: Displacement/Rotation
*Boundary
_PickedSet6, 1, 1
_PickedSet6, 2, 2
_PickedSet6, 3, 3
**
** PREDEFINED FIELDS
**
** Name: Predefined Field-1   Type: Temperature
*Initial Conditions, type=TEMPERATURE
Set-2, 773.
** ----------------------------------------------------------------
**
** STEP: Ramp
**
*Step, name=Ramp, nlgeom=YES, inc=1000
*Static
1., 236.2, .01, 10.
** 0.001, 0.2362, 0.00001, 0.01
**
** BOUNDARY CONDITIONS
**
** Name: BC-2 Type: Displacement/Rotation
*Boundary, amplitude=Amp-1
Set-3, 3, 3, 0.003
**
** OUTPUT REQUESTS
**
*Restart, write, frequency=0
**
** FIELD OUTPUT: F-Output-2
**
*Output, field, frequency=1
*Node Output, nset=Part-1-1.Set-1
U, UR, RF
*Element Output, elset=Part-1-1.Set-1, directions=YES
E, S, LE
**
** FIELD OUTPUT: F-Output-1
**
*Output, field, frequency=1
*Node Output, nset=Part-1-1.Set-1
U, UR, RF
*Element Output, elset=Part-1-1.Set-1, directions=YES
E, S, LE
**
** HISTORY OUTPUT: H-Output-2
**
*Output, history, frequency=1
*Node Output, nset=Part-1-1.Set-1
U3, RF
*Element Output, elset=Part-1-1.Set-1, directions=YES
E, S33, LE
**
** HISTORY OUTPUT: H-Output-1
**
*Output, history, frequency=1
*Node Output, nset=Part-1-1.Set-1
  U, RF
*End Step
